# Расчет валов (решение задачи)
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# A | B
F_t1 := 1885.7  # H
L_1 := 0.085  # м
F_r1 := 1525.2332  # H
L_2 := 0.061  # м
F_a1 := 344.95  # H
L_3 := 0.095  # м
F_t2 := 1946.049  # H
F_r2 := 633.526  # H
F_a2 := 316.763  # H
d_w1 := 0.128  # м
d_w2 := 0.119875  # м
m_a1 := F_a1*d_w1/2 = 22.0768  # Hм
m_a2 := F_a2*d_w2/2 = 18.986  # Hм
T := 116.642  # Hм
# Опорные реакции и изгибающие моменты в вертикальной плоскости
# sum(M_A)=F_r1*L_1 - R_BВ*(L_1 + L_2) - F_r2*(L_1 + L_2 + L_3) + m_a1 + m_a2=0
R_BВ := (F_r1*L_1 - F_r2*(L_1 + L_2 + L_3) + m_a1 + m_a2)/(L_1 + L_2) = 123.478  # H
# sum(M_B)=R_AВ*(L_1 + L_2) - F_r1*L_2 - F_r2*L_3 + m_a1 + m_a2=0
R_AВ := (F_r1*L_2 + F_r2*L_3 - m_a1 - m_a2)/(L_1 + L_2) = 768.229  # H
# Проверка:
# sum(F_y)=R_BВ + R_AВ - F_r1 + F_r2 = 0
# Изгибающие моменты:
# M(0)= 0 | H*м
# M(L_1)1=-R_AВ*L_1 = -65.2995 | H*м
# M(L_1)2=-R_AВ*L_1 + F_r1*0 - m_a1 = -87.3763 | H*м
# M(L_1 + L_2)1=-R_AВ*(L_1 + L_2) + F_r1*L_2 - m_a1 = -41.199
H*м
# M(L_1 + L_2)2=-R_AВ*(L_1 + L_2) + F_r1*L_2 - m_a1 - R_BВ*0 = -41.199
H*м
# M(L_1 + L_2+L_3)=-R_AВ*(L_1 + L_2 + L_3) + F_r1*(L_2 + L_3) - m_a1 - R_BВ*L_3 = 18.986
H*м
# Опорные реакции и изгибающие моменты в горизонтальной плоскости
# sum(M_A)=F_t1*L_1 + F_t2*(L_1 + L_2 + L_3) - R_BГ*(L_1 + L_2)=0
R_BГ := (F_t1*L_1 + F_t2*(L_1 + L_2 + L_3))/(L_1 + L_2) = 4310.15  # H
# sum(M_B)=-F_t1*L_2 + F_t2*L_3 - R_AГ*(L_1 + L_2)=0
R_AГ := (-F_t1*L_2 + F_t2*L_3)/(L_1 + L_2) = 478.404  # H
# Проверка:
# sum(F_y)=-R_BГ + R_AГ + F_t2 + F_t1=0
# Изгибающие моменты:
F_t1*(L_2 + L_3) = 294.169
F_t1 = 1885.7
# M(0)= 0 | H*м
# M(L_1)1=R_AГ*L_1 = 40.6643 | H*м
# M(L_1)2=R_AГ*L_1 + F_t1*0 = 40.6643 | H*м
# M(L_1 + L_2)1=R_AГ*(L_1 + L_2) + F_t1*L_2 = 184.875 | H*м
# M(L_1 + L_2)2=R_AГ*(L_1 + L_2) + F_t1*L_2 + R_BГ*0 = 184.875
H*м
# M(L_1 + L_2+L_3)=R_AГ*(L_1 + L_2 + L_3) + F_t1*(L_2 + L_3) - R_BГ*L_3 = 5.68434e-14
H*м
# Суммарные изгибающие моменты:
M_c1 := sqrt(M_в1^2 + M_г1^2)
M_c1 := sqrt(0^2 + 0^2) = 0  # H*м
M_c2 := sqrt(M_в2^2 + M_г2^2)
M_c2 := sqrt((-65.299)^2 + 40.664^2) = 76.9254  # H*м
M_c3 := sqrt(M_в3^2 + M_г3^2)
M_c3 := sqrt((-87.376)^2 + 40.664^2) = 96.3749  # H*м
M_c4 := sqrt(M_в4^2 + M_г4^2)
M_c4 := sqrt((-41.199)^2 + 184.875^2) = 189.41  # H*м
M_c5 := sqrt(M_в5^2 + M_г5^2)
M_c5 := sqrt((-41.199)^2 + 184.875^2) = 189.41  # H*м
M_c6 := sqrt(M_в6^2 + M_г6^2)
M_c6 := sqrt(18.986^2 + 0^2) = 18.986  # H*м
# Эквивалентные моменты:
M_экв1 := sqrt(0 + M_c1^2) = 0  # H*м
T = 116.642
M_экв2 := sqrt(0^2 + M_c2^2) = 76.9254  # H*м
M_экв3 := sqrt(T^2 + M_c3^2) = 151.306  # H*м
M_экв4 := sqrt(T^2 + M_c4^2) = 222.444  # H*м
M_экв5 := sqrt(T^2 + M_c5^2) = 222.444  # H*м
M_экв6 := sqrt(T^2 + M_c6^2) = 118.177  # H*м
# Определяем диаметр вала в самом нагруженном сечении, где эквивалентный момент максимален M_экв4 = 222.444
σ := 60  # МПа
d_KP := nthroot(M_экв4/(0.1*σ)*1000, 3) = 33.3444  # мм
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